r := 1  # radio de la esfera
L := 4*r/(sqrt(15) + sqrt(3))  # Lado del pentagono
L = 0.713644
a := l
ru := sqrt(6)/4*sqrt(3 + sqrt(5))*L
# radio externo
ru = 1
ri := L/4*sqrt((50 + 22*sqrt(5))/5)
# radio interno
ri = 0.794654
ap := L/(2*tan(36*π/180))
ap = 0.491123  # apotema
Ld := sqrt((L/2)^2 + ap^2)  # Lado de la diagonal
Ld = 0.607062
tanalfa := ri/Ld
α := atan(tanalfa)*180/π
α = 52.6226
α := atan(L/4*sqrt((50 + 22*sqrt(5))/5)/sqrt((L/2)^2 + (L/(2*tan(36*π/180)))^2))*180/π  # Redefiniendo solo en funcion al Lado L
α = 52.6226
r := 1
L = 0.713644  # Radios y Lado del pentagono
angulo_zeta1 := atan(L/4*sqrt((50 + 22*sqrt(5))/5)/sqrt((L/2)^2 + (L/(2*tan(36*π/180)))^2))*180/π
angulo_zeta1 = 52.6226
# Obtencion de los angulos de los puntos medios
h := sqrt(r^2 - (L/2)^2)
h = 0.934172  # Altura del triangulo isosceles entre diagonales del pentagono
α2 := atan(sqrt(r^2 - (L/2)^2)/(L/2))*180/π
α2 = 69.0948
β2 := 180 - 2*α2
angulo_zeta3 := angulo_zeta1 - β2
angulo_zeta3 = 10.8123
